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/BATCH
/COM,ANSYS RELEASE 2020 R2           BUILD 20.2      UP20200601       20:30:48
/input,menust,tmp,''
/COM,ANSYS RELEASE 2020 R2           BUILD 20.2      UP20200601       20:30:48
/GST,ON
/PLO,INFO,3
/GRO,CURL,ON
/CPLANE,1
WPSTYLE,,,,,,,,0
/POST26
FINISH
/POST1
SET,FIRST
FINISH
/SOL
/STATUS,SOLU
SOLVE
FINISH
/POST1
SET,FIRST
FINISH
! /EXIT,NOSAV
/BATCH
/COM,ANSYS RELEASE 2020 R2           BUILD 20.2      UP20200601       20:37:59
/input,menust,tmp,''
/COM,ANSYS RELEASE 2020 R2           BUILD 20.2      UP20200601       20:37:59
/GST,ON
/PLO,INFO,3
/GRO,CURL,ON
/CPLANE,1
WPSTYLE,,,,,,,,0
/SOLU
/STATUS,SOLU
SOLVE
FINISH
/POST1
SET,FIRST
SET,FIRST
FINISH
! /EXIT,NOSAV
